# 5. Поток машин, идущих по шоссе в одном направлении, представляет собой
# простейший поток с интенсивностью 4 машины в минуту. Шоссе имеет развилку в два
# направления. Вероятность движения машин в первом направлении равна 0,12, а во втором – 0,88. Определить интенсивности движения автомобилей в обоих направлениях.
λ := 4
ρ_1 := 0.12
ρ_2 := 0.88
λ_1 := ρ_1*λ = 0.48
λ_2 := ρ_2*λ = 3.52
