# 17. На железнодорожной станции расположена гостиница, в которой имеется 20
# мест. Посетитель в случае занятости мест уходит в другую гостиницу. Среднее время
# снятия гостиницы клиентом составляет 8 часов. Интенсивность потока поступления клиентов составляет 5 человек в час. Определить вероятность отказа и абсолютную пропускную способность данной гостиницы.
Ν := 20
t_обсл := 8
λ := 5
# Интенсивность обслуживания
μ := 1/t_обсл = 0.125
# Приведенная интенсивность
ρ := λ/μ = 40
# Вероятность что гостиница пуста
Ρ_0 := sum(ρ^i/i!, i = 0 .. Ν)^-1 = 1.1535e-14
# Вероятность
# отказа
Ρ_отк := ρ^Ν/Ν!*Ρ_0 = 0.521307
# Абсолютная пропускная способность
A := λ*(1 - Ρ_отк) = 2.39346
