N := 4
k := 1 .. N
λ := 10*6/(4*N) = 3.75
ν := 5*6/(4*N) = 1.875
ρ := λ/ν = 2
Ρ_0 := sum(ρ^i/i!, i = 0 .. N)^-1 = 0.142857
P(k) := ρ^k/k!*Ρ_0
# [plot: P(k) vs k]
Ρ_отк := P(N) = 0.0952381
M_зан := ρ*(1 - P(N)) = 1.80952
M_св := N - M_зан = 2.19048
Q := 1 - Ρ_отк = 0.904762
A := λ*Q = 3.39286
K_3 := M_зан/N = 0.452381
