N := 4
k := 1 .. 10
λ := 15*6/(4*N) = 5.625
ν := 5*6/(4*N) = 1.875
ρ := λ/ν = 3
Ρ_0 := (sum(ρ^i/i!, i = 0 .. N) + ρ^(N + 1)/(N!*(N - ρ)))^-1 = 0.0377358
P(k) := ρ^k/(N!*N^(k - N))*Ρ_0
# [plot: P(k) vs k]
Ρ_оч := ρ^(N + 1)/(N!*(N - ρ))*Ρ_0 = 0.382075
Ρ_зан := ρ^N/((N - 1)!*(N - ρ))*Ρ_0 = 0.509434
M_тр := Ρ_0*(ρ*sum(ρ^k/k!, k = 0 .. N - 1) + ρ^(N + 1)*(N + 1 - ρ)/((N - 1)!*(N - ρ)^2)) = 4.5283
M_оч := ρ^(N + 1)*Ρ_0/((N - 1)!*(N - ρ)^2) = 1.5283
M_св := sum((N - k)*ρ^k/k!*Ρ_0, k = 0 .. N - 1) = 1
M_зан := N - M_св = 3
T_ож := ρ^N/(ν*(N - 1)!*(N - ρ)^2)*Ρ_0 = 0.271698
T_суммож := ρ^(N + 1)/((N - 1)!*(N - ρ)^2)*Ρ_0 = 1.5283
T_тр := T_ож + 1/ν = 0.805031
T_стр := T_ож + ρ = 3.2717
A := ν = 1.875
