# Задание 1
a := 2
b := 4
n := 11
h := (b - a)/(n - 1) = 0.2
i := 0 .. 10
x[i] := a + i*h
x = [2; 2.2; 2.4; 2.6; 2.8; 3; 3.2; 3.4; 3.6; 3.8; 4]
y := [0.43; 0.99; 2.07; 2.54; 1.67; 1.29; 1.24; 0.66; 0.43; 0.35; 0.7]
# Задание 2
r := 1
j := 0 .. r
m := 0 .. r
X[j, m] := sum(x[i]^(j + m), i)
X = [11, 33; 33, 103.4]
Y[j] := sum(x[i]^j*y[i], i)
Y = [12.37; 35.046]
z := X^-1*Y
z = [2.53182; -0.469091]
P1(t) := z[0] + z[1]*t
P1(x) = [1.59364; 1.49982; 1.406; 1.31218; 1.21836; 1.12455; 1.03073; 0.936909; 0.843091; 0.749273; 0.655455]
r := 2
j := 0 .. r
m := 0 .. r
X[j, m] := sum(x[i]^(j + m), i)
X = [11, 33, 103.4; 33, 103.4, 336.6; 103.4, 336.6, 1131.73]
Y[j] := sum(x[i]^j*y[i], i)
Y = [12.37; 35.046; 102.462]
z := X^-1*Y
z = [-6.43904; 5.78965; -1.04312]
P2(t) := z[0] + z[1]*t + z[2]*t^2
P2(x) = [0.967762; 1.24947; 1.44772; 1.56253; 1.59389; 1.54179; 1.40625; 1.18726; 0.884816; 0.498923; 0.0295804]
r := 3
j := 0 .. r
m := 0 .. r
X[j, m] := sum(x[i]^(j + m), i)
X = [
    11, 33, 103.4, 336.6;
    33, 103.4, 336.6, 1131.73;
    103.4, 336.6, 1131.73, 3907.99;
    336.6, 1131.73, 3907.99, 13790.6
]
Y[j] := sum(x[i]^j*y[i], i)
Y = [12.37; 35.046; 102.462; 309.37]
z := X^-1*Y
z = [-65.1699; 67.8841; -22.3019; 2.36208]
P3(t) := z[0] + z[1]*t + z[2]*t^2 + z[3]*t^3
P3(x) = [0.287483; 1.38552; 1.9466; 2.08408; 1.91135; 1.54179; 1.08879; 0.665711; 0.385944; 0.362867; 0.70986]
# [plot: y, P1(x), P2(x), P3(x) vs x]
# Задание 3
sl := slope(x, y) = -0.469091
int := intercept(x, y) = 2.53182
reg(t) := int + sl*t
# [plot: y, reg(x) vs x]
# Задание 4
w := 2, 2.2 .. 4
S2 := regress(x, y, 2)
re(w) := interp(S2, x, y, w)
S3 := regress(x, y, 3)
re2(w) := interp(S3, x, y, w)
# [plot: y, re(w), re2(w) vs x, w]
span1 := 0.75
vs1 := loess(x, y, span1)
lo1(w) := interp(vs1, x, y, w)
span2 := 2.75
vs2 := loess(x, y, span2)
lo2(w) := interp(vs2, x, y, w)
# [plot: y, lo1(w), lo2(w) vs x, w]
# Задание 5
f1(x) := atan(x)
f2(x) := ln(x)
f3(x) := sin(x)
F(x) := [f1(x); f2(x); f3(x)]
a := linfit(x, y, F)
a = [-22.67; 26.2498; 8.04357]
f(x) := F(x)*a
# [plot: y, f(w) vs x, w]
# Задание 6
vs := [1; 1; 1]
F(x, u) := [
    e^(u[0] + u[1]*x + u[2]*x^2);
    e^(u[0] + u[1]*x + u[2]*x^2);
    x*e^(u[0] + u[1]*x + u[2]*x^2);
    x^2*e^(u[0] + u[1]*x + u[2]*x^2)
]
u := genfit(x, y, vs, F)
g(x) := F(x, u)[0]
u = [-16.7728; 13.1175; -2.45464]
# [plot: y, g(w) vs x, w]
